# NUFEB simulation

atom_style	bio
atom_modify	map array sort 1000 5.0e-7
boundary	pp pp ff
newton		off
processors  * * 1

comm_modify	vel yes
read_data_bio atom.in

##############Define initial particle distribution##############

lattice sc 1e-6 origin 0 0 0
region reg block 0 1000 0 1000 0 100
#shell rm -f rngs.txt
#shell for s in {1..100};do echo $RANDOM >> rngs.txt; done
variable seed file rngs.txt
variable cyanoCells equal 10
variable cyanoMass equal ${cyanoCells}*1.3e3*4/3*PI*(1.37e-6/2)^3

create_atoms 1 random ${cyanoCells} ${seed} reg
#create_atoms 1 random 10 3124 reg
create_atoms 2 random 1 56151 reg


set type 1 density 1.3e3
set type 1 diameter 1.37e-6
set type 1 mass ${cyanoMass}#1.75e-14 #5.1e-15
#variable vratio equal "${vfinal}/${v0}"
set type 2 density 1.3e3
set type 2 diameter 1.55e-6
set type 2 mass 5.1e-15

group CYANO type 1
group DEAD type 2


neighbor	5e-7 bin
neigh_modify	delay 0 one 5000

##############Define DEM Variables&Commands##############

pair_style  gran/hooke/history 1.e-4 NULL 1.e-5 NULL 0.0 1
pair_coeff  * *

timestep 10

#fix 1 all nve/limit 1e-8
fix fv all viscous 1e-5

fix zw all wall/gran hooke/history 2000 NULL 500.0 NULL 1.5 0 zplane  0.0  1e-04

variable kanc equal 50

#fix zwa all walladh v_kanc zplane  0.0  1e-04

variable ke equal 5e+10
#fix j1 all epsadh 1 v_ke 1

##############Define IBm Variables##############

#variables used in fix eps_extract
variable EPSdens equal 30
variable EPSratio equal 1.3

#variables used in fix division
variable divDia equal 1.94e-6

#variable used for sucrose export
variable sucRatio index 0.0 0.1 0.2 0.3 0.4 0.5 0.6 0.7 0.8

#variables used in fix kinetics
variable diffT equal 1e-4
variable tol equal 1e-6
variable etaHET equal 0.6
variable layer equal -1

#variables used in fix death
variable deadDia equal 9e-7


##############Define IBm Commands##############

fix k1 all kinetics 100 50 50 5 v_diffT v_layer niter 5000
fix kgm all kinetics/growth/monod sucexp ${sucRatio} gflag 1
fix g1 all kinetics/diffusion v_tol pp pp nn #kg dcflag 2
fix d1 all divide 100 v_EPSdens v_divDia 64564
fix d2 all death 1 v_deadDia demflag 0


##############Define IBm Computes##############

compute myNtypes all ntypes
compute myMass all biomass
compute myCon all avg_con

##############Simulation Output##############

dump		id all custom 1000 output.lammmps id type diameter x y z
dump		du1 all vtk 1000 atom_*.vtu id type diameter x y z
dump		du2 all grid 1000 grid_%_*.vti con
dump            du3 all bio 1000 ntypes biomass avg_con
thermo_style    custom step cpu atoms c_myNtypes[2] c_myNtypes[3]
thermo		100
thermo_modify	lost ignore

shell mkdir Sucrose_${sucRatio}
shell cd Sucrose_${sucRatio}

run 40000
shell cd ..
clear
next sucRatio
next seed
jump SELF
